Simulations: Version=123
  Simulation
    Clock: Start=2011-01-01; End=2011-12-31
    Summary SummaryFile
    Weather: FileName=.\Goond.met
    SoilArbitrator
    Zone Field: Area=1; Slope=0; AspectAngle=0; Altitude=50
      Report: VariableNames=[Wheat].Grain.Total.Wt*10 as Yield; EventNames=[Wheat].Harvesting
      Fertiliser
      SurfaceOrganicMatter: InitialResidueName=wheat_stubble; InitialResidueType=wheat; InitialResidueMass=500; InitialStandingFraction=0; InitialCPR=0; InitialCNR=100
      Plant Wheat
      MicroClimate: a_interception=0; b_interception=1; c_interception=0; d_interception=0; soil_albedo=0.3; SoilHeatFluxFraction=0.4; MinimumHeightDiffForNewLayer=0; NightInterceptionFraction=0.5; ReferenceHeight=2
      Manager SowingFertiliser
        Amount = 350
        CropName = wheat
```csharp
using Models.PMF;
using Models.Core;
using System;
namespace Models
{
    [Serializable]
    public class Script : Model
    {
        [Link] Clock Clock;
        [Link] Fertiliser Fertiliser;
        [Link] Summary Summary;
        
        
        [Description("Amount of fertiliser to be applied (kg/ha)")]
        public double Amount { get; set;}
        
        [Description("Crop to be fertilised")]
        public string CropName { get; set;}
        
        
        

        [EventSubscribe("Sowing")]
        private void OnSowing(object sender, EventArgs e)
        {
            Model crop = sender as Model;
            if (crop.Name.ToLower()==CropName.ToLower())
                Fertiliser.Apply(Amount: Amount, Type: Fertiliser.Types.UreaN);
        }
        
    }
}
```
      Manager Harvest
```csharp
using Models.Soils.Nutrients;
using System;
using Models.Core;
using Models.PMF;
using Models.Soils;
using Models.Soils.Nutrients;
using Models.Utilities;
using APSIM.Shared.Utilities;

namespace Models
{
    [Serializable]
    public class Script : Model
    {
        [Link] Plant Wheat;

        [EventSubscribe("DoManagement")]
        private void OnDoManagement(object sender, EventArgs e)
        {
            if (Wheat.IsReadyForHarvesting)
            {
               Wheat.Harvest();
               Wheat.EndCrop();    
            }
        
        }
        
    }
}
```
      Irrigation
      Manager SowingRule
        StartDate = 25-apr
        EndDate = 1-jun
        MinESW = 80
        MinRain = 10
        RainDays = 10
        CultivarName = Sunbri
        SowingDepth = 30
        RowSpacing = 250
        Population = 100
```csharp
using Models.Interfaces;
using System;
using Models.Core;
using Models.PMF;
using Models.Soils;
using Models.Soils.Nutrients;
using Models.Utilities;
using APSIM.Shared.Utilities;
using Models.Climate;

namespace Models
{
    [Serializable]
    public class Script : Model
    {
        [Link] private Clock Clock;
        [Link] private Fertiliser Fertiliser;
        [Link] private Summary Summary;
        [Link(ByName = true)] private Plant Wheat;
        [Link] private Soil Soil;
        private Accumulator accumulatedRain;
        [Link]
        private ISoilWater waterBalance;
        [Link] Irrigation irrigation;
        
        [Description("Start of sowing window (d-mmm)")]
        public string StartDate { get; set;}
        [Description("End of sowing window (d-mmm)")]
        public string EndDate { get; set;}
        [Description("Minimum extractable soil water for sowing (mm)")]
        public double MinESW { get; set;}
        [Description("Accumulated rainfall required for sowing (mm)")]
        public double MinRain { get; set;}
        [Description("Duration of rainfall accumulation (d)")]
        public int RainDays { get; set;}
        [Description("Cultivar to be sown")]
        [Display(Type=DisplayType.CultivarName, PlantName = "Wheat")]
        public string CultivarName { get; set;}
        [Description("Sowing depth (mm)")]
        public double SowingDepth { get; set;}        
        [Description("Row spacing (mm)")]
        public double RowSpacing { get; set;}    
        [Description("Plant population (/m2)")]
        public double Population { get; set;}    
        
        
        [EventSubscribe("StartOfSimulation")]
        private void OnSimulationCommencing(object sender, EventArgs e)
        {
            accumulatedRain = new Accumulator(this, "[Weather].Rain", RainDays);
        }
        

        [EventSubscribe("DoManagement")]
        private void OnDoManagement(object sender, EventArgs e)
        {
            accumulatedRain.Update();

            if (DateUtilities.WithinDates(StartDate,Clock.Today,EndDate))
            {
                if (!Wheat.IsAlive && DateUtilities.DatesEqual(EndDate, Clock.Today))
                {
                    irrigation.Apply(20f);
                    Wheat.Sow(population:Population, cultivar:CultivarName,
                              depth:SowingDepth, rowSpacing:RowSpacing);
                }
                else if (!Wheat.IsAlive &&
                         MathUtilities.Sum(waterBalance.ESW) > MinESW &&
                         accumulatedRain.Sum > MinRain)
                {
                    Wheat.Sow(population:Population, cultivar:CultivarName,
                              depth:SowingDepth, rowSpacing:RowSpacing);
                }
            }
        }
    }
}
```
      Soil Grey Vertosol (Thallon No906): ASCOrder=Vertosol; ASCSubOrder=Grey; SoilType=Clay; Site=Thallon; NearestTown=Thallon; Region=Darling Downs and Granite Belt; State=Queensland; Country=Australia; NaturalVegetation=Coolibah; ApsoilNumber=906; Latitude=-28.3288; Longitude=148.469; DataSource=Stuart Pilcher (DEEDI). Bullawarrie site.
        Physical
          Thickness  BD       AirDry  LL15   DUL       SAT
          150        1.29869  0.09    0.234  0.405117  0.479928
          150        1.35877  0.152   0.258  0.407258  0.457258
          300        1.35147  0.19    0.257  0.410013  0.460013
          300        1.36509  0.19    0.259  0.404871  0.454871
          300        1.40302  0.181   0.254  0.390558  0.440558
          300        1.59376  0.17    0.271  0.318583  0.368583
          300        1.67742  0.17    0.271  0.287011  0.337011
          SoilCrop WheatSoil
            LL=[0.233764, 0.258166, 0.256778, 0.259368, 0.253947, 0.270938, 0.270938]
            KL=[0.06, 0.06, 0.06, 0.04, 0.04, 0.02, 0.01]
            XF=[1, 1, 1, 1, 1, 1, 1]
            LL source: Field measured and checked for sensibility
        WaterBalance SoilWater: SummerDate=1-Nov; SummerU=2; SummerCona=4.5; WinterDate=1-Apr; WinterU=2; WinterCona=3.9; DiffusConst=40; DiffusSlope=16; Salb=0.12; CN2Bare=73; CNRed=20; CNCov=0.8; Thickness=[150, 150, 300, 300, 300, 300, 300]; SWCON=[0.3, 0.3, 0.3, 0.3, 0.3, 0.3, 0.3]
        SoilNitrogen: fom_types=[default, manure, mucuna, lablab, shemp, stable]; fract_carb=[0.2, 0.3, 0.54, 0.57, 0.45, 0]; fract_cell=[0.7, 0.3, 0.37, 0.37, 0.47, 0.1]; fract_lign=[0.1, 0.4, 0.09, 0.06, 0.08, 0.9]; NPartitionApproach=0
          SoilNitrogenNO3 NO3
          SoilNitrogenNH4 NH4
          SoilNitrogenUrea Urea
          SoilNitrogenPlantAvailableNO3 PlantAvailableNO3
          SoilNitrogenPlantAvailableNH4 PlantAvailableNH4
        Organic: FOMCNRatio=40
          Thickness  Carbon  SoilCNRatio  FBiom  FInert  FOM
          150        1.326   12           0.04   0.4     347.129
          150        1.0608  12           0.02   0.6     270.344
          300        0.663   12           0.02   0.8     163.972
          300        0.3315  12           0.02   1       99.4541
          300        0.1989  12           0.01   1       60.322
          300        0.1326  12           0.01   1       36.5871
          300        0.1326  12           0.01   1       22.1912
        Chemical
          Thickness  PH   CL    EC    ESP
          150        8.4  36    0.16  4
          150        8.6  215   0.33  15
          300        7.8  964   1.93  30.8
          300        7.5  1060  2.97  23.9
          300        7.4  1080  3.24  19
          300        5.5  1110  3.07  17.4
          300        5.5  0     0     0
        Sample Initial conditions: Depth=[0-180]; Thickness=[1800]; SWUnits=Volumetric; OCUnits=Total; PHUnits=Water
        CERESSoilTemperature Temperature
        Sample InitialSW: Thickness=[150, 150, 300, 300, 300, 300, 300]; SW=[0.26, 0.326667, 0.39, 0.420333, 0.447, 0.48, 0.47]; SWUnits=Volumetric; OCUnits=Total; PHUnits=Water
        InitialWater Initial water: PercentMethod=0; FractionFull=0.2
      Manager IrrigationPolicy
```csharp
using Models.Utilities;
using Models.Core;
using System.Collections.Generic;
using System;

namespace Models
{
    [Serializable]
    public class Script : Model
    {
        [Link] Irrigation irrigation;
        [Link] Clock clock;
        [Link] PMF.Plant wheat;
        [Link] PMF.Organs.Leaf leaf;
        [Link] WaterModel.WaterBalance waterBalance;
        [Link] Climate.Weather weather;
        
        float day;
        float stage;
        float fw;
        float lai;
        float[] esw = new float[7];
        float cuIrrig = 0f;
        float cuRain = 0f;
        int action = 0; // No irrigation as the default
        float[] probs;
        bool irrigationOn = false;


        [EventSubscribe("Sowing")]
        private void OnSowing(object sender, EventArgs e)
        {
            irrigationOn = true;
        }


        // This can be "StartOfDay", which precedes "DoManagement" in each day
        [EventSubscribe("DoManagement")]
        private void OnDoManagement(object sender, EventArgs e)
        {
            if (irrigationOn)
            {
                // State
                day = (float)clock.Today.DayOfYear;
                stage = (float)wheat.Phenology.Zadok;
                fw = (float)leaf.Fw;
                lai = (float)wheat.LAI;
                for (int i = 0; i < 7; i++)
                    esw[i] = (float)waterBalance.ESW[i];

                // Action
                var result = Program.policyNet.Action(stage, fw, lai, esw, cuIrrig, cuRain);
                // Follow the policy only from episode=2. In episode=1,
                // use the initial action=0 to inject the knowledge that
                // "No irrigation is reasonable." The random initial weights
                // move towards action=0.
                // if (Program.episode > 1)
                //     action = result.Item1;
                action = result.Item1;
                probs = result.Item2;
                irrigation.Apply(Program.amounts[action]);
           }
        }


        [EventSubscribe("EndOfDay")]
        private void OnEndOfDay(object sender, EventArgs e)
        {
            if (irrigationOn)
            {
                Program.days.Add(day);
                Program.stages.Add(stage);
                Program.fws.Add(fw);
                Program.lais.Add(lai);
                Program.esw0s.Add(esw[0]);
                Program.esw1s.Add(esw[1]);
                Program.esw2s.Add(esw[2]);
                Program.esw3s.Add(esw[3]);
                Program.esw4s.Add(esw[4]);
                Program.esw5s.Add(esw[5]);
                Program.esw6s.Add(esw[6]);
                Program.cuIrrigs.Add(cuIrrig); // a one-day lag
                Program.cuRains.Add(cuRain); // a one-day lag
                Program.actions.Add(action);
                Program.probs.Add(probs);
                
                cuIrrig += Program.amounts[action];
                cuRain += (float)weather.Rain;

                // Deactivated at Stage 85
                if (stage >= 85)
                    irrigationOn = false;
            }
        }


//        [EventSubscribe("Harvesting")]
//        private void OnHarvesting(object sender, EventArgs e)
//        {
//            irrigationOn = false;
//        }
    }
}
```
  DataStore
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